# Calculul termic al unui motor cu aprindere prin scanteie
# BMW M54B30
# Puterea nominală:
P_n := 170
# Turația nominală:
n_n := 5900
# Numărul de cilindri:
i := 6
# Alegerea parametrilor inițiali
# Temperatura inițială:
T[0] := 293
# Presiunea inițială:
p[0] := 1.02*10^5
# Temperatura gazelor reziduale:
T_r := 950
# Presiunea gazelor reziduale:
p_r := 1.05*10^5
# Coeficientul de exces de aer:
λ := 1
# Raportul de comprimare:
ε := 10.2
# Parametrii procesului de schimbare a gazelor
# Presiunea la sfârșitul admisiei
p_a := 0.85*10^5
# Preîncălzirea amestecului
ΔT := 21
# Coeficientul de postumplere
ν_p := 1.11
# Se calculează în continuare coeficientul gazelor reziduale:
γ_r := (T[0] + ΔT)/T_r*p_r/(ε*p_a*ν_p - p_r) = 0.0404787
# Temperatura la sfârșitul admisiei:
T_a := (T[0] + ΔT + γ_r*T_r)/(1 + γ_r) = 338.743
# Coeficientul de umplere:
η_v := (p_r*T[0])/(p[0]*T_a)*ε/(ε - 1)*ν_p/(1 + γ_r) = 1.05315
# COMPRIMAREA
# Coeficientul politropic de comprimare:
n[1] := 1.32
# Presiunea la sfârsitul comprimării:
p_c := p_a*ε^n[1] = 1822935
# Temperatura la sfârșitul comprimării va fi:
T_c := T_a*ε^(n[1] - 1) = 712.233
# Parametrii procesului de ardere
# Se adoptă urmatoarea compoziție a benzinei:
c := 0.854
h := 0.142
o := 0.004
# Puterea calorică inferioară:
Q_I := 43500
# Coeficientul de utilizare a căldurii:
ξ := 0.9
# Masa molară a combustibilului:
M_c := 1/114 = 0.00877193
# Aerul minim necesar arderii a 1 kg de combustibil se calculează cu relatia:
L_min := 1/0.21*(c/12 + h/4 - o/32) = 0.507341
# Cantitatea de aer necesară arderii este:
L := λ*L_min = 0.507341
# Cantitatea de încărcătură proaspătă,raportată la 1 kg combustibil va fi:
M[1] := L + M_c = 0.516113
# Coeficientul teoretic de variație molară a încărcăturii proaspete pentru λ < 1*este:
μ := (0.79*λ*L_min + h/2 + c/12)/(λ*L_min + M_c) = 1.05203
# Coeficientul real de variație molară a încărăturii proaspete rezultă:
μ_f := (μ + γ_r)/(1 + γ_r) = 1.05001
# Caldura specifică molară medie a amestecului inițial este:
C_mv' := 20 + 17.4*10^-3*T_c = 32.3929
# Căldura specifică degajată de arderea incompletă va fi:
ΔQ_aI := 61000*(1 - λ) = 0
Q_aI := Q_I - ΔQ_aI = 43500
# Temperatura la sfârșitul arderii rezultă din următoarea ecuație:
C_μv' := 32.53
C_μv'' := 20.61 + 27.23*10^-4*T_z  # error: This variable is undefined. Check that the label is set correctly.
a' := (15.5 + 13.8*λ)*10^-4*μ_f = 0.00307652
b' := (18.4 + 2.6*λ)*μ_f = 22.0501
c' := (ξ*Q_aI/((λ*L_min + M_c)*(1 + γ_r)) + C_μv'*T_c)*(-1) = -96073.3
Δ := b'^2 - 4*a'*c' = 1668.49
T_z := (-b' + sqrt(Δ))/(2*a') = 3054.93
# Căldura specifică molară medie a gazelor de ardere pentru λ < 1*este:
C_mv'' := (18.4 + 2.6*λ) + (15.5 + 13.8*λ)*10^-4*T_z = 29.9509
# Presiunea la sfârșitul arderii se calculează cu relația:
p_z := p_c*μ*T_z/T_c = 8225791
# Gradul de creștere a presiunii:
π := p_z/p_c = 4.51239
# Procesul de destindere
# Coeficientul politropic al destinderii:
n[2] := 1.23
# Presiunea la sfârșitul destinderii:
p_b := p_z/ε^(n[2] - 1) = 4821694
# Temperatura la sfârșitul destinderii:
T_b := T_z/ε^(n[2] - 1) = 1790.7
# Parametrii principali ai motorului
# Coeficientul de rotunjire a diagramei:
μ_r := 0.96
# Randamentul mecanic:
η_m := 0.84
# Presiunea medie a ciclului teoretic se obține din relația:
p_I' := p_c/(ε - 1)*[π/(n[2] - 1)*(1 - 1/ε^(n[2] - 1)) - 1/(n[1] - 1)*(1 - 1/e^(n[1] - 1))] = [1439172]
p_I := μ_r*p_I' = [1381605]
# Randamentul indicat al motorului este:
R_M := 8.314
η_I := R_M*(p_I*M[1]*T[0])/(p[0]*η_v*Q_I) = [0.371731]
# Presiunea medie efectivă:
p_e := η_m*p_I = [1160548]
# Randamentul efectiv al motorului va fi:
η_e := η_m*η_I = [0.312254]
# Consumul specific de combustibil:
g_e := 36000/(η_e*Q_I) = [2.65036]
# Dimensiunile fundamentale ale motorului
# Raportul cursa-alezaj
ϕ := 1.067
# Capacitatea cilindrică necesară va fi:
V_h := (120000*P_n)/(p_e*n_n*i)*10^3 = [0.496551]
# Se determină alezajul și cursa pistonului:
D := (4*V_h/(3.14*ϕ))^(1/3)*10^2 = [84.0059]
S := ϕ*D = [89.6343]
# Viteza medie a pistonului:
W_m := (S*n_n)/30*10^-3 = [17.6281]
# Cilindreea totală a motorului:
V_t := V_h*i = [2.9793]
# Puterea litrică a motorului:
P_l := P_n/V_t = [57.0603]
